// COMSOL Multiphysics 6.1.0.357 model "Scintillator2D_1DStudy_WorkingRefl.mph"
// Outline of the model tree

Parameters
  LYSO_L = 0.057[m]
  LYSO_h = 0.003[m]
  mesh_size = 0.0001[m]
  Glue_thick = 0.0002
  Resin_Thick = 0.0005
  SiPM_Thick = 0.0003
  t_r = 60e-12[s]
  t_d = 39e-9[s]
  v = 0.97
  v0 = c_const*v
  time_step = 0.5e-11
  time_end = 10e-9
  maxmeshsize = 0.0015
  minmeshsize = 0.00075
  impact_location = 0.05
  sim_x = LYSO_L/2-LYSO_L*impact_location
  space_impact = 0[mm]
  displace_x = LYSO_L/2-sim_x
  SiPM_perc = 0.8
  LYSO2 = LYSO_L - sim_x
  start_LYSO2 = displace_x-space_impact
  Study1D = 0.75
  impact_cyl = 0
  impact_width = 0.0001
  xI = impact_location*LYSO_L/2
  ym = LYSO_h/2*(2-2*Study1D)/(LYSO_L/2)
  yn = LYSO_h/2*Study1D
  ymin = -(ym*xI+yn)
  Ampl = 1
  DEDX = 2916.6
  Yield = 40000
  c_const_g = 3e8
  h_const_g = 6.626e-34
  e_const_g = 8.854e-12
  T = 200e-9[s]
  td = 39e-9
  lambda = 420e-9
  expval = (-1+exp(T/t_d))
  I0 = (c_const_g*DEDX*h_const_g*Yield)/(e_const_g*td*lambda*expval)
  I0_2 = I0^0.5
  sigma = 0
  mur = 1

Functions
  an1: Analytic | funcname = t0; expr = (y-(ymin))/v0; args = y; argunit = m
  an2: Analytic | funcname = Heaviside_t0; expr = 0.5 * (1 + tanh((t-t0(y)) / (t_r/100))); args = {t, y}; argunit = {s, m}
  an3: Analytic | funcname = risedecay; expr = (exp(-(t-t0(y))/(2*t_d))-exp(-(t-t0(y))/(2*t_r))); args = {t, y}; argunit = {s, m}
  an4: Analytic | funcname = A; expr = Ampl*I0^0.5*risedecay(t,y)*Heaviside_t0(t,y); args = {t, y}; argunit = {s, m}
  an5: Analytic | funcname = Heaviside_0; expr = 0.5 * (1 + tanh(y / (1e-12))); args = y
  step1: Step

Selections
  sel1: Explicit "Win" on boundaries 18, 19
  sel2: Explicit "Wout" on boundaries 7, 30

Probes
  pdom1: DomainPoint "Domain Point Probe 1" | bndsnap2 = on; coords = {-LYSO_L/2-Glue_thick-0.0003, 0}
    ppb1: PointExpr "Point Probe Expression 1"
      expr = temw.We
      unit = J/m^3
      descr = Electric energy density
      table = tbl3
  pdom2: DomainPoint "Domain Point Probe 2" | bndsnap2 = on; coords = {LYSO_L/2+Glue_thick+0.0003, 0}
    ppb2: PointExpr "Point Probe Expression 2"
      expr = temw.We
      unit = J/m^3
      descr = Electric energy density
      table = tbl3
  pdom3: DomainPoint "Domain Point Probe 3" (disabled) | bndsnap2 = on; coords = {impact_location*LYSO_L/2+0.0005, 0}
    ppb3: PointExpr "Point Probe Expression 3" | expr = temw.normE; unit = V/m; descr = Electric field norm
  bnd1: Boundary "Boundary Probe 1" (disabled) on boundaries 18, 19
    expr = temw.We
    unit = J/m^3
    descr = Electric energy density

Geometry
  geom1 "Geometry 1" (2D, length unit m)
    r2: Rectangle "Air" (disabled)
      pos = {-LYSO_L/2-Glue_thick-Resin_Thick, -0.006}
      size = {LYSO_L+Glue_thick*2+Resin_Thick*2, 0.012}
    pol1: Polygon "LYSO"
      source = table
      table = 
        {-LYSO_L/2, -LYSO_h/2*(2-Study1D)}
        {-LYSO_L/2, LYSO_h/2*(2-Study1D)}
        {0, LYSO_h/2*Study1D}
        {LYSO_L/2, LYSO_h/2*(2-Study1D)}
        {LYSO_L/2, -LYSO_h/2*(2-Study1D)}
        {0, -LYSO_h/2*Study1D}
        {-LYSO_L/2, -LYSO_h/2*(2-Study1D)}
    r3: Rectangle "Impact" | pos = {-impact_width/2+impact_location*LYSO_L/2, -3}; size = {impact_width, 6}
    r1: Rectangle "Impact_Copy" | pos = {-impact_width/2+impact_location*LYSO_L/2, -3}; size = {impact_width, 6}
    dif1: Difference | input = pol1, r2; input2 = r1
    dif2: Difference | input = dif1; input2 = r3
    r4: Rectangle "Resin"
      pos = {-(LYSO_L/2)-Glue_thick-Resin_Thick, -0.0015-0.001-(LYSO_h/2*(2-Study1D)-0.003/2)*Heaviside_0(1-Study1D)}
      size = {Resin_Thick, 0.006+(LYSO_h*(2-Study1D)-0.003)*Heaviside_0(1-Study1D)}
    r6: Rectangle "SiPM" | pos = {-LYSO_L/2-Resin_Thick-Glue_thick, -0.0015}; size = {SiPM_Thick, 0.003}
    r5: Rectangle "Glue" | pos = {-(LYSO_L/2)-Glue_thick, -LYSO_h/2*(2-Study1D)}; size = {Glue_thick, LYSO_h*(2-Study1D)}
    r7: Rectangle "Resin 1"
      pos = {(LYSO_L/2)+Glue_thick, -0.0015-0.001-(LYSO_h/2*(2-Study1D)-0.003/2)*Heaviside_0(1-Study1D)}
      size = {Resin_Thick, 0.006+(LYSO_h*(2-Study1D)-0.003)*Heaviside_0(1-Study1D)}
    r8: Rectangle "SiPM 1" | pos = {(LYSO_L/2)+Glue_thick+Resin_Thick-SiPM_Thick, -0.0015}; size = {SiPM_Thick, 0.003}
    r9: Rectangle "Glue 1" | pos = {+(LYSO_L/2), -LYSO_h/2*(2-Study1D)}; size = {Glue_thick, LYSO_h*(2-Study1D)}
    dif3: Difference | input = r7; input2 = r8
    dif4: Difference | input = r4; input2 = r6
    r10: Rectangle (disabled) | pos = {LYSO_L/4, -0.003}; size = {0.00001, 0.006}
    r11: Rectangle (disabled) | pos = {-LYSO_L/2, 0.0015}; size = {LYSO_L, 0.00001}
    r12: Rectangle (disabled) | pos = {-LYSO_L/4, -0.003}; size = {0.00001, 0.006}
    r13: Rectangle (disabled) | pos = {-LYSO_L/2, -0.0015}; size = {LYSO_L, 0.00001}
    r14: Rectangle "SiPM 1.1" | pos = {(LYSO_L/2)+Glue_thick+Resin_Thick-SiPM_Thick, -0.0015}; size = {SiPM_Thick, 0.003}
    r15: Rectangle "SiPM 2" | pos = {-LYSO_L/2-Resin_Thick-Glue_thick, -0.0015}; size = {SiPM_Thick, 0.003}
    dif5: Difference | input = dif2; input2 = r14, r15
    fin: Finalize "Form Union"

Materials
  mat1: Common "Air" on all domains
    def "Basic"
      thermalexpansioncoefficient = alpha_p(pA,T)
      molarmass = 0.02897[kg/mol]
      bulkviscosity = muB(T)
      relpermeability = 1
      relpermittivity = 1
      dynamicviscosity = eta(T)
      ratioofspecificheat = 1.4
      electricconductivity = 0[S/m]
      heatcapacity = Cp(T)
      density = rho(pA,T)
      thermalconductivity = k(T)
      soundspeed = cs(T)
      eta: Piecewise | arg = T; pieces = {200.0, 1600.0, -8.38278E-7+8.35717342E-8*T^1-7.69429583E-11*T^2+4.6437266E-14*T^3-1.06585607E-17*T^4}; argunit = K; fununit = Pa*s
      Cp: Piecewise | arg = T; pieces = {200.0, 1600.0, 1047.63657-0.372589265*T^1+9.45304214E-4*T^2-6.02409443E-7*T^3+1.2858961E-10*T^4}; argunit = K; fununit = J/(kg*K)
      rho: Analytic | expr = pA*0.02897/R_const[K*mol/J]/T; args = {pA, T}; fununit = kg/m^3; argunit = {Pa, K}
      k: Piecewise | arg = T; pieces = {200.0, 1600.0, -0.00227583562+1.15480022E-4*T^1-7.90252856E-8*T^2+4.11702505E-11*T^3-7.43864331E-15*T^4}; argunit = K; fununit = W/(m*K)
      cs: Analytic | expr = sqrt(1.4*R_const[K*mol/J]/0.02897*T); args = T; fununit = m/s; argunit = K
      an1: Analytic | funcname = alpha_p; expr = -1/rho(pA,T)*d(rho(pA,T),T); args = {pA, T}; fununit = 1/K; argunit = {Pa, K}
      an2: Analytic "Analytic 2a" | funcname = muB; expr = 0.6*eta(T); args = T; fununit = Pa*s; argunit = K
    RefractiveIndex
      n = 1
      ki = 0
    NonlinearModel
      BA = (def.gamma+1)/2
    idealGas
      Rs = R_const/Mn
      heatcapacity = Cp(T)
      ratioofspecificheat = 1.4
      molarmass = 0.02897
      Cp: Piecewise | arg = T; pieces = {200.0, 1600.0, 1047.63657-0.372589265*T^1+9.45304214E-4*T^2-6.02409443E-7*T^3+1.2858961E-10*T^4}; argunit = K; fununit = J/(kg*K)
  mat2: Common "LYSO" on domains 3, 4
    def "Basic"
      relpermeability = mur
      relpermittivity = 3.42
      electricconductivity = sigma[S/m]
      eta: Piecewise | arg = T; pieces = {200.0, 1600.0, -8.38278E-7+8.35717342E-8*T^1-7.69429583E-11*T^2+4.6437266E-14*T^3-1.06585607E-17*T^4}; argunit = K; fununit = Pa*s
      Cp: Piecewise | arg = T; pieces = {200.0, 1600.0, 1047.63657-0.372589265*T^1+9.45304214E-4*T^2-6.02409443E-7*T^3+1.2858961E-10*T^4}; argunit = K; fununit = J/(kg*K)
      rho: Analytic | expr = pA*0.02897/R_const[K*mol/J]/T; args = {pA, T}; fununit = kg/m^3; argunit = {Pa, K}
      k: Piecewise | arg = T; pieces = {200.0, 1600.0, -0.00227583562+1.15480022E-4*T^1-7.90252856E-8*T^2+4.11702505E-11*T^3-7.43864331E-15*T^4}; argunit = K; fununit = W/(m*K)
      cs: Analytic | expr = sqrt(1.4*R_const[K*mol/J]/0.02897*T); args = T; fununit = m/s; argunit = K
      an1: Analytic | funcname = alpha_p; expr = -1/rho(pA,T)*d(rho(pA,T),T); args = {pA, T}; fununit = 1/K; argunit = {Pa, K}
      an2: Analytic "Analytic 2a" | funcname = muB; expr = 0.6*eta(T); args = T; fununit = Pa*s; argunit = K
    RefractiveIndex
      n = 1.85
      ki = 0
    NonlinearModel (disabled)
      BA = (def.gamma+1)/2
    idealGas (disabled)
      Rs = R_const/Mn
      heatcapacity = Cp(T)
      ratioofspecificheat = 1.4
      molarmass = 0.02897
      Cp: Piecewise | arg = T; pieces = {200.0, 1600.0, 1047.63657-0.372589265*T^1+9.45304214E-4*T^2-6.02409443E-7*T^3+1.2858961E-10*T^4}; argunit = K; fununit = J/(kg*K)
  mat3: Common "Glue" on domains 2, 5
    def "Basic"
      thermalexpansioncoefficient = alpha_p(pA,T)
      molarmass = 0.02897[kg/mol]
      bulkviscosity = muB(T)
      relpermeability = 1
      relpermittivity = 2.25
      dynamicviscosity = eta(T)
      ratioofspecificheat = 1.4
      electricconductivity = sigma[S/m]
      heatcapacity = Cp(T)
      density = rho(pA,T)
      thermalconductivity = k(T)
      soundspeed = cs(T)
      eta: Piecewise | arg = T; pieces = {200.0, 1600.0, -8.38278E-7+8.35717342E-8*T^1-7.69429583E-11*T^2+4.6437266E-14*T^3-1.06585607E-17*T^4}; argunit = K; fununit = Pa*s
      Cp: Piecewise | arg = T; pieces = {200.0, 1600.0, 1047.63657-0.372589265*T^1+9.45304214E-4*T^2-6.02409443E-7*T^3+1.2858961E-10*T^4}; argunit = K; fununit = J/(kg*K)
      rho: Analytic | expr = pA*0.02897/R_const[K*mol/J]/T; args = {pA, T}; fununit = kg/m^3; argunit = {Pa, K}
      k: Piecewise | arg = T; pieces = {200.0, 1600.0, -0.00227583562+1.15480022E-4*T^1-7.90252856E-8*T^2+4.11702505E-11*T^3-7.43864331E-15*T^4}; argunit = K; fununit = W/(m*K)
      cs: Analytic | expr = sqrt(1.4*R_const[K*mol/J]/0.02897*T); args = T; fununit = m/s; argunit = K
      an1: Analytic | funcname = alpha_p; expr = -1/rho(pA,T)*d(rho(pA,T),T); args = {pA, T}; fununit = 1/K; argunit = {Pa, K}
      an2: Analytic "Analytic 2a" | funcname = muB; expr = 0.6*eta(T); args = T; fununit = Pa*s; argunit = K
    RefractiveIndex
      n = 1.5
      ki = 0
    NonlinearModel
      BA = (def.gamma+1)/2
    idealGas
      Rs = R_const/Mn
      heatcapacity = Cp(T)
      ratioofspecificheat = 1.4
      molarmass = 0.02897
      Cp: Piecewise | arg = T; pieces = {200.0, 1600.0, 1047.63657-0.372589265*T^1+9.45304214E-4*T^2-6.02409443E-7*T^3+1.2858961E-10*T^4}; argunit = K; fununit = J/(kg*K)
  mat4: Common "Resin" on domains 1, 6
    def "Basic"
      thermalexpansioncoefficient = alpha_p(pA,T)
      molarmass = 0.02897[kg/mol]
      bulkviscosity = muB(T)
      relpermeability = 1
      relpermittivity = 2.4025
      dynamicviscosity = eta(T)
      ratioofspecificheat = 1.4
      electricconductivity = sigma[S/m]
      heatcapacity = Cp(T)
      density = rho(pA,T)
      thermalconductivity = k(T)
      soundspeed = cs(T)
      eta: Piecewise | arg = T; pieces = {200.0, 1600.0, -8.38278E-7+8.35717342E-8*T^1-7.69429583E-11*T^2+4.6437266E-14*T^3-1.06585607E-17*T^4}; argunit = K; fununit = Pa*s
      Cp: Piecewise | arg = T; pieces = {200.0, 1600.0, 1047.63657-0.372589265*T^1+9.45304214E-4*T^2-6.02409443E-7*T^3+1.2858961E-10*T^4}; argunit = K; fununit = J/(kg*K)
      rho: Analytic | expr = pA*0.02897/R_const[K*mol/J]/T; args = {pA, T}; fununit = kg/m^3; argunit = {Pa, K}
      k: Piecewise | arg = T; pieces = {200.0, 1600.0, -0.00227583562+1.15480022E-4*T^1-7.90252856E-8*T^2+4.11702505E-11*T^3-7.43864331E-15*T^4}; argunit = K; fununit = W/(m*K)
      cs: Analytic | expr = sqrt(1.4*R_const[K*mol/J]/0.02897*T); args = T; fununit = m/s; argunit = K
      an1: Analytic | funcname = alpha_p; expr = -1/rho(pA,T)*d(rho(pA,T),T); args = {pA, T}; fununit = 1/K; argunit = {Pa, K}
      an2: Analytic "Analytic 2a" | funcname = muB; expr = 0.6*eta(T); args = T; fununit = Pa*s; argunit = K
    RefractiveIndex
      n = 1.55
      ki = 0
    NonlinearModel
      BA = (def.gamma+1)/2
    idealGas
      Rs = R_const/Mn
      heatcapacity = Cp(T)
      ratioofspecificheat = 1.4
      molarmass = 0.02897
      Cp: Piecewise | arg = T; pieces = {200.0, 1600.0, 1047.63657-0.372589265*T^1+9.45304214E-4*T^2-6.02409443E-7*T^3+1.2858961E-10*T^4}; argunit = K; fununit = J/(kg*K)

Physics
  temw: TransientElectromagneticWaves "Electromagnetic Waves, Transient" on all domains
    dependent variable A = {Ax, Ay, Az}
    wee1: WaveEquationElectric (default)
    pec1: PerfectElectricConductor (default)
    init1: init "Initial Values 1" (default)
    sctr1: Scattering "Scattering Boundary Condition 1" on boundaries 18, 19
      IncidentField = EField
      E0i = {A(t,y)/2*1/sqrt(3), A(t,y)/2*1/sqrt(3), A(t,y)/2*1/sqrt(3)}
      WaveType = CylindricalWave
      kdir = {-temw.nx, 0, 0}
      r0 = {impact_location*LYSO_L/2, y, 0}
      DispersionAndAbsorptionModel = LowLossApproximation
      CarrierFrequency = 0.0024[GHz]
    sctr3: Scattering "Scattering Boundary Condition 3" on boundaries 18
      IncidentField = EField
      E0i = {A(t,y)/2*1/sqrt(3), A(t,y)/2*1/sqrt(3), A(t,y)/2*1/sqrt(3)}
      WaveType = CylindricalWave
      kdir = {-temw.nx, 0, 0}
      r0 = {impact_location*LYSO_L/2, y, 0}
      DispersionAndAbsorptionModel = LowLossApproximation
      CarrierFrequency = 0.0024[GHz]
    sctr2: Scattering "Scattering Boundary Condition 2" on boundaries 1-13, 22-34
      DispersionAndAbsorptionModel = LowLossApproximation
      CarrierFrequency = 0.0024[GHz]

Mesh
  mesh1 "Mesh 1"
    size: MeshSizeDefault | hmax = maxmeshsize; hmin = minmeshsize; hauto = 1; custom = on
    ftri1: FreeTri "Free Triangular 1" on remaining entities | smoothmaxiter = 4; smoothmaxdepth = 4
      size1: Size on boundaries 1-9, 11-13, 18, 19, 22, 25-34 | hmax = minmeshsize; hmin = minmeshsize; custom = on
      size2: Size on domains 1, 2, 5, 6 | hmax = minmeshsize; hmin = minmeshsize; custom = on

Studies
  std1 "Study 1"
    time: Transient "Time Dependent" | tlist = range(0,100e-12,200e-9)

Solver configurations
  sol1 "Solution 1" (study std1)
    v1: Variables "Dependent Variables 1"
    t1: Time "Time-Dependent Solver 1" | tlist = range(0,100e-12,200e-9); rtol = 0.001; timemethod = genalpha
      fc1: FullyCoupled | linsolver = d1
      d1: Direct "Suggested Direct Solver (temw)" | linsolver = pardiso

Datasets
  dset1: Solution | solution = sol1
  dset2: Solution "Probe Solution 2" | solution = sol1
  cpt1: CutPoint2D "Domain Point Probe 1" | data = dset2; pointx = -3.0E-4-0.5*LYSO_L-Glue_thick; pointy = 0
  cpt2: CutPoint2D "Domain Point Probe 2" | data = dset2; pointx = 3.0E-4+0.5*LYSO_L+Glue_thick; pointy = 0
  cpt3: CutPoint2D "Domain Point Probe 3" | data = dset2; pointx = 5.0E-4+0.5*impact_location*LYSO_L; pointy = 0
  dset3: Solution "Probe Solution 3" | solution = sol1
  avh1: Average "Boundary Probe 1" on boundaries 18, 19 | data = dset3

Derived values
  pev1: EvalPoint "Point Probe Expression 1" | data = cpt1; table = tbl3; expr = temw.We
  int1: IntLine "Line Integration 1" on boundaries 30-32
    data = dset1
    table = new
    expr = temw.We/h_const_g/c_const_g*lambda
    unit = J/m^2
  pev2: EvalPoint "Point Probe Expression 2" | data = cpt2; table = tbl3; expr = temw.We
  pev3: EvalPoint "Point Probe Expression 3" | data = cpt3; expr = temw.normE
  int2: IntLine "OutWeInt_Tab2" on selection sel2
    data = dset1
    table = tbl7
    expr = temw.We
    unit = J/m^2
    descr = Electric energy density
    method = integration
    dataseries = integral
    dataseriesmethod = summation
    dataseriescumulative = on
  int3: IntLine "Line Integration 3" on boundaries 7, 30
    data = dset1
    table = tbl2
    expr = temw.We
    unit = J/m^2
    descr = Electric energy density
  int4: IntLine "Line Integration 4" on boundaries 3, 5, 7
    data = dset1
    table = new
    expr = temw.We
    unit = J/m^2
    descr = Electric energy density
  int5: IntLine "Line Integration 5" on boundaries 3, 5, 7, 30-32
    data = dset1
    table = new
    expr = temw.We
    unit = J/m^2
    descr = Electric energy density
  int6: IntLine "WeInInt_Tab1" on boundaries 18, 19
    data = dset1
    table = tbl5
    expr = temw.We
    unit = J/m^2
    descr = Electric energy density
    dataseries = integral
    dataseriesmethod = integration
    dataseriescumulative = on
  int7: IntLine "WeInt_Tab3" on selection sel1
    data = dset1
    table = new
    expr = temw.We
    unit = J/m^2
    descr = Electric energy density
    dataseriesmethod = integration
    dataseriescumulative = on
  int8: IntLine "Line Integration 8" on boundaries 18, 19
    data = dset1
    table = new
    expr = temw.We
    unit = J/m^2
    descr = Electric energy density
    dataseriesmethod = integration
    dataseriescumulative = on
  int9: IntLine "Line Integration 9" on boundaries 3, 5, 7, 30-32
    data = dset1
    table = new
    expr = temw.We
    unit = J/m^2
    descr = Electric energy density
    dataseriesmethod = integration
    dataseriescumulative = on
  int10: IntLine "Line Integration 10" on boundaries 18, 19
    data = dset1
    table = new
    expr = temw.normE
    unit = V
    descr = Electric field norm
  pev4: EvalPoint "Boundary Probe 1"
    data = avh1
    table = new
    expr = temw.We
    dataseries = integral
    dataseriescumulative = on

Tables
  tbl1: Table
    // OutWeInt_Tab2
    Time (s) | Cumulative integral: Electric energy density (J/m^2) | Cumulative integral: Electric energy density (J/m^2)
    0 | 1.31469e-72 | 5.12758e-72
    1e-10 | 5.03826e-09 | 2.75758e-09
    2e-10 | 0.00215585 | 0.002342
    3e-10 | 0.0197811 | 0.0225716
    4e-10 | 0.070433 | 0.0789274
    5e-10 | 0.165954 | 0.1832
    6e-10 | 0.310823 | 0.339206
    7e-10 | 0.504216 | 0.545099
    8e-10 | 0.742108 | 0.796107
    9e-10 | 1.01911 | 1.08615
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  tbl2: Table
    // Line Integration 3
    Time (s) | Electric energy density (J/m^2) | Electric energy density (J/m^2)
    0 | 1.31469e-72 | 5.12758e-72
    1e-10 | 5.03826e-09 | 2.75758e-09
    2e-10 | 0.00215585 | 0.002342
    3e-10 | 0.0176253 | 0.0202296
    4e-10 | 0.0506519 | 0.0563558
    5e-10 | 0.0955214 | 0.104273
    6e-10 | 0.144868 | 0.156006
    7e-10 | 0.193393 | 0.205892
    8e-10 | 0.237892 | 0.251008
    9e-10 | 0.277006 | 0.290044
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  tbl3: Table "Probe Table 3"
    Time (s) | Electric energy density (J/m^3), Point: (-3.0E-4-0.5*LYSO_L-Glue_thick, 0) | Electric energy density (J/m^3), Point: (3.0E-4+0.5*LYSO_L+Glue_thick, 0)
    0 | 1.5939e-81 | 2.7873e-77
    2e-10 | 4.63308e-09 | 7.46583e-09
    6e-10 | 2.68708e-07 | 3.45845e-07
    1e-09 | 6.89929e-07 | 7.62364e-07
    1.4e-09 | 7.24371e-07 | 7.48755e-07
    1.8e-09 | 8.05665e-07 | 8.26063e-07
    2.2e-09 | 8.03057e-07 | 8.00995e-07
    2.6e-09 | 7.91759e-07 | 7.96407e-07
    3.4e-09 | 7.94293e-07 | 7.90921e-07
    4.2e-09 | 7.61161e-07 | 7.60698e-07
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  tbl4: Table
    // OutWeInt_Tab2
    Time (s) | Cumulative integral: Electric energy density (J/m^2) | Cumulative integral: Electric energy density (J/m^2)
    0 | 5.12758e-80 | 1.31469e-80
    1e-10 | 7.76676e-12 | 6.69764e-12
    2e-10 | 3.88338e-11 | 3.34882e-11
    3e-10 | 2.42325e-10 | 2.13938e-10
    4e-10 | 7.69739e-10 | 6.847e-10
    5e-10 | 1.80485e-09 | 1.62415e-09
    6e-10 | 3.4368e-09 | 3.19405e-09
    7e-10 | 5.50465e-09 | 5.16815e-09
    8e-10 | 7.99856e-09 | 7.59341e-09
    9e-10 | 1.09164e-08 | 1.03704e-08
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  tbl5: Table
    // WeInInt_Tab1
    Time (s) | Cumulative integral: Electric energy density (J*s/m^2) | Cumulative integral: Electric energy density (J*s/m^2)
    0 | 0 | 0
    1e-10 | 2.89441e-19 | 2.30086e-19
    2e-10 | 1.73668e-18 | 1.38055e-18
    3e-10 | 3.77807e-18 | 3.00277e-18
    4e-10 | 5.31465e-18 | 4.22222e-18
    5e-10 | 6.95264e-18 | 5.49916e-18
    6e-10 | 9.15311e-18 | 7.30757e-18
    7e-10 | 1.13202e-17 | 9.21226e-18
    8e-10 | 1.32592e-17 | 1.0751e-17
    9e-10 | 1.5404e-17 | 1.22517e-17
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  tbl6: Table
    // OutWeInt_Tab2
    Time (s) | Cumulative integral: Electric energy density (J/m^2) | Cumulative integral: Electric energy density (J/m^2)
    0 | 1.50987e-80 | 5.91211e-80
    1e-10 | 1.00398e-11 | 1.13641e-11
    2e-10 | 5.01991e-11 | 5.68203e-11
    3e-10 | 2.95859e-10 | 3.48372e-10
    4e-10 | 9.219e-10 | 1.09993e-09
    5e-10 | 2.1032e-09 | 2.50472e-09
    6e-10 | 4.01465e-09 | 4.76728e-09
    7e-10 | 6.42714e-09 | 7.43477e-09
    8e-10 | 9.40002e-09 | 1.05414e-08
    9e-10 | 1.29926e-08 | 1.3977e-08
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  tbl7: Table
    // OutWeInt_Tab2
    Time (s) | Cumulative integral: Electric energy density (J/m^2) | Cumulative integral: Electric energy density (J/m^2) | Cumulative integral: Electric energy density (J/m^2)
    0 | 6.2755e-80 | 1.59163e-80 | 1.04924e-79
    1e-10 | 1.20198e-11 | 1.06185e-11 | 9.02047e-12
    2e-10 | 6.00989e-11 | 5.30927e-11 | 4.51023e-11
    3e-10 | 3.68843e-10 | 3.13487e-10 | 2.76726e-10
    4e-10 | 1.16495e-09 | 9.77449e-10 | 8.74054e-10
    5e-10 | 2.65516e-09 | 2.23063e-09 | 2.00725e-09
    6e-10 | 5.05727e-09 | 4.25867e-09 | 3.84647e-09
    7e-10 | 7.89277e-09 | 6.82121e-09 | 6.21386e-09
    8e-10 | 1.11986e-08 | 9.98185e-09 | 9.17693e-09
    9e-10 | 1.48563e-08 | 1.38042e-08 | 1.28032e-08
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
Plots
  pg1: PlotGroup2D "2D Plot Group 1" | data = dset1
    surf1: Surface | expr = temw.normE; descr = Electric field norm
    surf2: Surface (disabled) | expr = temw.normE
  pg4: PlotGroup1D "1D Plot Group 4" | data = dset1
    lngr1: LineGraph (disabled) | expr = temw.normE
    tblp1: Table "Table Graph 1" (disabled) | table = tbl1
    tblp2: Table "Table Graph 2" | table = tbl4
  pg5: PlotGroup1D "Probe Plot Group 5"
    tblp1: Table "Probe Table Graph 1" | table = tbl3

Exports
  anim1: Animation | target = player; framesel = all; maxframes = 2001; frametime = 0.01