// COMSOL Multiphysics 6.1.0.357 model "Scintillator2D_1DStudy_jRINDEXfreqSpline.mph"
// Outline of the model tree

Parameters
  LYSO_L = 0.057[m]
  LYSO_h = 0.003[m]
  mesh_size = 0.0001[m]
  Glue_thick = 0.0002
  Resin_Thick = 0.00055
  SiPM_Thick = 0.0003
  t_r = 60e-12[s]
  t_d = 39e-9[s]
  v = 0.99
  v0 = c_const*v
  time_step = 0.5e-11
  time_end = 10e-9
  maxmeshsize = 0.0015
  minmeshsize = 0.00075
  impact_location = 0.005
  sim_x = LYSO_L/2-LYSO_L*impact_location
  space_impact = 0[mm]
  displace_x = LYSO_L/2-sim_x
  SiPM_perc = 0.8
  LYSO2 = LYSO_L - sim_x
  start_LYSO2 = displace_x-space_impact
  Study1D = 1.1
  impact_cyl = 0
  impact_width = 0.0001
  xI = impact_location*LYSO_L/2
  ym = LYSO_h/2*(2-2*Study1D)/(LYSO_L/2)
  yn = LYSO_h/2*Study1D
  ymin = -(ym*xI+yn)
  Ampl = 0.01
  DEDX = 2916.6
  Yield = 40000
  c_const_g = 3e8
  h_const_g = 6.626e-34
  e_const_g = 8.854e-12
  T = 200e-9[s]
  td = 39e-9
  lambda = 420e-9
  expval = (-1+exp(T/t_d))
  I0 = (c_const_g*DEDX*h_const_g*Yield)/(e_const_g*td*lambda*expval)
  I0_2 = I0^0.5
  sigma = 0
  mur = 1
  AirThick = 0.003
  GlueExtra = 0.0002
  jRINDEX = 8.3559e-05
  jRINDEX_G = 2.5710e-06
  jRINDEX_R = 4.1779e-07
  wavelength = 1.5[mm]
  p0 = 1.5
  p1 = 1
  p2 = 1
  p3 = 1
  p4 = 1
  p5 = 1
  p6 = 1
  p7 = 1
  p8 = 1
  m0 = 0.5
  m1 = 1
  m2 = 1
  m3 = 1
  m4 = 1
  m5 = 1
  m6 = 1
  m7 = 1
  m8 = 1

Functions
  an1: Analytic | funcname = t0; expr = (y-(ymin))/v0; args = y; argunit = m
  an2: Analytic | funcname = Heaviside_t0; expr = 0.5 * (1 + tanh((t-t0(y)) / (t_r/100))); args = {t, y}; argunit = {s, m}
  an3: Analytic | funcname = risedecay; expr = (exp(-(t-t0(y))/(2*t_d))-exp(-(t-t0(y))/(2*t_r))); args = {t, y}; argunit = {s, m}
  an5: Analytic | funcname = Heaviside_0; expr = 0.5 * (1 + tanh(y / (1e-12))); args = y
  step1: Step
  an6: Analytic | funcname = Heaviside_ymin; expr = 0.5 * (1 + tanh((y-ymin*0.98) / (-ymin/100))); args = y; argunit = s
  an7: Analytic | funcname = Heaviside_ymax; expr = 1-0.5 * (1 + tanh((y+ymin*0.98) / (-ymin/100))); args = y; argunit = s
  an4: Analytic | funcname = A; expr = Ampl*I0^0.5*risedecay(t,y)*Heaviside_t0(t,y)*Heaviside_ymax(y)*Heaviside_ymin(y); args = {t, y}; argunit = {s, m}

Selections
  sel1: Explicit "Win" on boundaries 23, 24
  sel2: Explicit "Wout" on boundaries 12, 35

Probes
  pdom1: DomainPoint "Domain Point Probe 1" | bndsnap2 = on; coords = {-LYSO_L/2-Glue_thick-0.0003, 0}
    ppb1: PointExpr "Point Probe Expression 1"
      expr = temw.We
      unit = J/m^3
      descr = Electric energy density
      table = tbl1
  pdom2: DomainPoint "Domain Point Probe 2" | bndsnap2 = on; coords = {LYSO_L/2+Glue_thick+0.0003, 0}
    ppb2: PointExpr "Point Probe Expression 2"
      expr = temw.We
      unit = J/m^3
      descr = Electric energy density
      table = tbl1
  pdom3: DomainPoint "Domain Point Probe 3" (disabled) | bndsnap2 = on; coords = {impact_location*LYSO_L/2+0.0005, 0}
    ppb3: PointExpr "Point Probe Expression 3" | expr = temw.normE; unit = V/m; descr = Electric field norm
  bnd1: Boundary "Boundary Probe 1" (disabled) on boundaries 23, 24
    expr = temw.We
    unit = J/m^3
    descr = Electric energy density

Geometry
  geom1 "Geometry 1" (2D, length unit m)
    r2: Rectangle "Air" (disabled)
      pos = {-LYSO_L/2-Glue_thick-Resin_Thick, -0.006}
      size = {LYSO_L+Glue_thick*2+Resin_Thick*2, 0.012}
    pol2: Polygon "LYSO 1"
      source = table
      table = 
        {-LYSO_L/2-Glue_thick-Resin_Thick, -0.006}
        {-LYSO_L/2-Glue_thick-Resin_Thick, 0.006}
        {0, 0.006}
        {LYSO_L/2+Glue_thick+Resin_Thick, 0.006}
        {LYSO_L/2+Glue_thick+Resin_Thick, -0.006}
        {0, -0.006}
        {-LYSO_L/2-Glue_thick-Resin_Thick, -0.006}
    pol1: Polygon "LYSO" (disabled)
      source = table
      table = 
        {-LYSO_L/2, -LYSO_h/2*(2-Study1D)}
        {-LYSO_L/2, LYSO_h/2*(2-Study1D)}
        {0, LYSO_h/2*Study1D}
        {LYSO_L/2, LYSO_h/2*(2-Study1D)}
        {LYSO_L/2, -LYSO_h/2*(2-Study1D)}
        {0, -LYSO_h/2*Study1D}
        {-LYSO_L/2, -LYSO_h/2*(2-Study1D)}
    ic1: InterpolationCurve
      table = 
        {-LYSO_L/2*(8-0)/8, LYSO_h/2*p0}
        {-LYSO_L/2*(8-1)/8, LYSO_h/2*p1}
        {-LYSO_L/2*(8-2)/8, LYSO_h/2*p2}
        {-LYSO_L/2*(8-3)/8, LYSO_h/2*p3}
        {-LYSO_L/2*(8-4)/8, LYSO_h/2*p4}
        {-LYSO_L/2*(8-5)/8, LYSO_h/2*p5}
        {-LYSO_L/2*(8-6)/8, LYSO_h/2*p6}
        {-LYSO_L/2*(8-7)/8, LYSO_h/2*p7}
        {-LYSO_L/2*(8-8)/8, LYSO_h/2*p8}
        {LYSO_L/2*(8-7)/8, LYSO_h/2*p7}
        {LYSO_L/2*(8-6)/8, LYSO_h/2*p6}
        {LYSO_L/2*(8-5)/8, LYSO_h/2*p5}
        {LYSO_L/2*(8-4)/8, LYSO_h/2*p4}
        {LYSO_L/2*(8-3)/8, LYSO_h/2*p3}
        {LYSO_L/2*(8-2)/8, LYSO_h/2*p2}
        {LYSO_L/2*(8-1)/8, LYSO_h/2*p1}
        {LYSO_L/2, LYSO_h/2*p0}
      starttang = {0.0547858469996, -0.0227649957217}
      endtang = {0.0547858469996, 0.0227649957217}
    ic2: InterpolationCurve
      table = 
        {-LYSO_L/2*(8-0)/8, -LYSO_h/2*m0}
        {-LYSO_L/2*(8-1)/8, -LYSO_h/2*m1}
        {-LYSO_L/2*(8-2)/8, -LYSO_h/2*m2}
        {-LYSO_L/2*(8-3)/8, -LYSO_h/2*m3}
        {-LYSO_L/2*(8-4)/8, -LYSO_h/2*m4}
        {-LYSO_L/2*(8-5)/8, -LYSO_h/2*m5}
        {-LYSO_L/2*(8-6)/8, -LYSO_h/2*m6}
        {-LYSO_L/2*(8-7)/8, -LYSO_h/2*m7}
        {-LYSO_L/2*(8-8)/8, -LYSO_h/2*m8}
        {LYSO_L/2*(8-7)/8, -LYSO_h/2*m7}
        {LYSO_L/2*(8-6)/8, -LYSO_h/2*m6}
        {LYSO_L/2*(8-5)/8, -LYSO_h/2*m5}
        {LYSO_L/2*(8-4)/8, -LYSO_h/2*m4}
        {LYSO_L/2*(8-3)/8, -LYSO_h/2*m3}
        {LYSO_L/2*(8-2)/8, -LYSO_h/2*m2}
        {LYSO_L/2*(8-1)/8, -LYSO_h/2*m1}
        {LYSO_L/2, -LYSO_h/2*m0}
      starttang = {0.0547858469996, -0.0227649957217}
      endtang = {0.0547858469996, 0.0227649957217}
    ls1: LineSegment
      specify1 = coord
      coord1 = {-LYSO_L/2*(8-0)/8, LYSO_h/2*p0}
      specify2 = coord
      coord2 = {-LYSO_L/2*(8-0)/8, -LYSO_h/2*m0}
    ls2: LineSegment
      specify1 = coord
      coord1 = {LYSO_L/2*(8-0)/8, LYSO_h/2*p0}
      specify2 = coord
      coord2 = {LYSO_L/2*(8-0)/8, -LYSO_h/2*m0}
    uni1: Union | input = ic1, ic2, ls1, ls2
    csol1: ConvertToSolid | input = uni1
    r3: Rectangle "Impact" | pos = {-impact_width/2+impact_location*LYSO_L/2, -3}; size = {impact_width, 6}
    r1: Rectangle "Impact_Copy" | pos = {-impact_width/2+impact_location*LYSO_L/2, -3}; size = {impact_width, 6}
    dif1: Difference | input = csol1; input2 = r1
    dif2: Difference | input = dif1; input2 = r3
    r4: Rectangle "Resin"
      pos = {-(LYSO_L/2)-Glue_thick-Resin_Thick, -0.0015-0.001-(LYSO_h/2*(2-Study1D)-0.003/2)*Heaviside_0(1-Study1D)}
      size = {Resin_Thick, 0.006+(LYSO_h*(2-Study1D)-0.003)*Heaviside_0(1-Study1D)}
    r6: Rectangle "SiPM" | pos = {-LYSO_L/2-Resin_Thick-Glue_thick, -0.0015}; size = {SiPM_Thick, 0.003}
    r5: Rectangle "Glue"
      pos = {-(LYSO_L/2)-Glue_thick, -LYSO_h/2*m0-GlueExtra}
      size = {Glue_thick, LYSO_h*(p0+m0)/2+GlueExtra*2}
    r7: Rectangle "Resin 1"
      pos = {(LYSO_L/2)+Glue_thick, -0.0015-0.001-(LYSO_h/2*(2-Study1D)-0.003/2)*Heaviside_0(1-Study1D)}
      size = {Resin_Thick, 0.006+(LYSO_h*(2-Study1D)-0.003)*Heaviside_0(1-Study1D)}
    r8: Rectangle "SiPM 1" | pos = {(LYSO_L/2)+Glue_thick+Resin_Thick-SiPM_Thick, -0.0015}; size = {SiPM_Thick, 0.003}
    r9: Rectangle "Glue 1"
      pos = {+(LYSO_L/2), -LYSO_h/2*(m0)-GlueExtra}
      size = {Glue_thick, LYSO_h*(p0+m0)/2+GlueExtra*2}
    dif3: Difference | input = r7; input2 = r8
    dif4: Difference | input = r4; input2 = r6
    r10: Rectangle (disabled) | pos = {LYSO_L/4, -0.003}; size = {0.00001, 0.006}
    r11: Rectangle (disabled) | pos = {-LYSO_L/2, 0.0015}; size = {LYSO_L, 0.00001}
    r12: Rectangle (disabled) | pos = {-LYSO_L/4, -0.003}; size = {0.00001, 0.006}
    r13: Rectangle (disabled) | pos = {-LYSO_L/2, -0.0015}; size = {LYSO_L, 0.00001}
    r14: Rectangle "SiPM 1.1" | pos = {(LYSO_L/2)+Glue_thick+Resin_Thick-SiPM_Thick, -0.0015}; size = {SiPM_Thick, 0.003}
    r15: Rectangle "SiPM 2" | pos = {-LYSO_L/2-Resin_Thick-Glue_thick, -0.0015}; size = {SiPM_Thick, 0.003}
    pol3: Polygon "LYSO 2" (disabled)
      source = table
      table = 
        {-LYSO_L/2, -LYSO_h/2*(2-Study1D)}
        {-LYSO_L/2, LYSO_h/2*(2-Study1D)}
        {0, LYSO_h/2*Study1D}
        {LYSO_L/2, LYSO_h/2*(2-Study1D)}
        {LYSO_L/2, -LYSO_h/2*(2-Study1D)}
        {0, -LYSO_h/2*Study1D}
        {-LYSO_L/2, -LYSO_h/2*(2-Study1D)}
    ic3: InterpolationCurve
      table = 
        {-LYSO_L/2*(8-0)/8, LYSO_h/2*p0}
        {-LYSO_L/2*(8-1)/8, LYSO_h/2*p1}
        {-LYSO_L/2*(8-2)/8, LYSO_h/2*p2}
        {-LYSO_L/2*(8-3)/8, LYSO_h/2*p3}
        {-LYSO_L/2*(8-4)/8, LYSO_h/2*p4}
        {-LYSO_L/2*(8-5)/8, LYSO_h/2*p5}
        {-LYSO_L/2*(8-6)/8, LYSO_h/2*p6}
        {-LYSO_L/2*(8-7)/8, LYSO_h/2*p7}
        {-LYSO_L/2*(8-8)/8, LYSO_h/2*p8}
        {LYSO_L/2*(8-7)/8, LYSO_h/2*p7}
        {LYSO_L/2*(8-6)/8, LYSO_h/2*p6}
        {LYSO_L/2*(8-5)/8, LYSO_h/2*p5}
        {LYSO_L/2*(8-4)/8, LYSO_h/2*p4}
        {LYSO_L/2*(8-3)/8, LYSO_h/2*p3}
        {LYSO_L/2*(8-2)/8, LYSO_h/2*p2}
        {LYSO_L/2*(8-1)/8, LYSO_h/2*p1}
        {LYSO_L/2, LYSO_h/2*p0}
      starttang = {0.0547858469996, -0.0227649957217}
      endtang = {0.0547858469996, 0.0227649957217}
    ic4: InterpolationCurve
      table = 
        {-LYSO_L/2*(8-0)/8, -LYSO_h/2*m0}
        {-LYSO_L/2*(8-1)/8, -LYSO_h/2*m1}
        {-LYSO_L/2*(8-2)/8, -LYSO_h/2*m2}
        {-LYSO_L/2*(8-3)/8, -LYSO_h/2*m3}
        {-LYSO_L/2*(8-4)/8, -LYSO_h/2*m4}
        {-LYSO_L/2*(8-5)/8, -LYSO_h/2*m5}
        {-LYSO_L/2*(8-6)/8, -LYSO_h/2*m6}
        {-LYSO_L/2*(8-7)/8, -LYSO_h/2*m7}
        {-LYSO_L/2*(8-8)/8, -LYSO_h/2*m8}
        {LYSO_L/2*(8-7)/8, -LYSO_h/2*m7}
        {LYSO_L/2*(8-6)/8, -LYSO_h/2*m6}
        {LYSO_L/2*(8-5)/8, -LYSO_h/2*m5}
        {LYSO_L/2*(8-4)/8, -LYSO_h/2*m4}
        {LYSO_L/2*(8-3)/8, -LYSO_h/2*m3}
        {LYSO_L/2*(8-2)/8, -LYSO_h/2*m2}
        {LYSO_L/2*(8-1)/8, -LYSO_h/2*m1}
        {LYSO_L/2, -LYSO_h/2*m0}
      starttang = {0.0547858469996, -0.0227649957217}
      endtang = {0.0547858469996, 0.0227649957217}
    ls3: LineSegment
      specify1 = coord
      coord1 = {-LYSO_L/2*(8-0)/8, LYSO_h/2*p0}
      specify2 = coord
      coord2 = {-LYSO_L/2*(8-0)/8, -LYSO_h/2*m0}
    ls4: LineSegment
      specify1 = coord
      coord1 = {LYSO_L/2*(8-0)/8, LYSO_h/2*p0}
      specify2 = coord
      coord2 = {LYSO_L/2*(8-0)/8, -LYSO_h/2*m0}
    uni2: Union | input = ic3, ic4, ls3, ls4
    csol2: ConvertToSolid | input = uni2
    r16: Rectangle "Impact_Copy 1" (disabled)
      pos = {-impact_width/2+impact_location*LYSO_L/2, -3}
      size = {impact_width, 6}
    dif5: Difference | input = pol2; input2 = csol2, r14, r15
    r17: Rectangle "SiPM 1.1.1"
      pos = {(LYSO_L/2)+Glue_thick+Resin_Thick-SiPM_Thick, -0.0015}
      size = {SiPM_Thick, 0.003}
    r18: Rectangle "SiPM 2.1" | pos = {-LYSO_L/2-Resin_Thick-Glue_thick, -0.0015}; size = {SiPM_Thick, 0.003}
    fin: Finalize "Form Union"

Materials
  mat1: Common "Air" on all domains
    def "Basic"
      thermalexpansioncoefficient = alpha_p(pA,T)
      molarmass = 0.02897[kg/mol]
      bulkviscosity = muB(T)
      relpermeability = 1
      relpermittivity = 1
      dynamicviscosity = eta(T)
      ratioofspecificheat = 1.4
      electricconductivity = 0[S/m]
      heatcapacity = Cp(T)
      density = rho(pA,T)
      thermalconductivity = k(T)
      soundspeed = cs(T)
      eta: Piecewise | arg = T; pieces = {200.0, 1600.0, -8.38278E-7+8.35717342E-8*T^1-7.69429583E-11*T^2+4.6437266E-14*T^3-1.06585607E-17*T^4}; argunit = K; fununit = Pa*s
      Cp: Piecewise | arg = T; pieces = {200.0, 1600.0, 1047.63657-0.372589265*T^1+9.45304214E-4*T^2-6.02409443E-7*T^3+1.2858961E-10*T^4}; argunit = K; fununit = J/(kg*K)
      rho: Analytic | expr = pA*0.02897/R_const[K*mol/J]/T; args = {pA, T}; fununit = kg/m^3; argunit = {Pa, K}
      k: Piecewise | arg = T; pieces = {200.0, 1600.0, -0.00227583562+1.15480022E-4*T^1-7.90252856E-8*T^2+4.11702505E-11*T^3-7.43864331E-15*T^4}; argunit = K; fununit = W/(m*K)
      cs: Analytic | expr = sqrt(1.4*R_const[K*mol/J]/0.02897*T); args = T; fununit = m/s; argunit = K
      an1: Analytic | funcname = alpha_p; expr = -1/rho(pA,T)*d(rho(pA,T),T); args = {pA, T}; fununit = 1/K; argunit = {Pa, K}
      an2: Analytic "Analytic 2a" | funcname = muB; expr = 0.6*eta(T); args = T; fununit = Pa*s; argunit = K
    RefractiveIndex
      n = 1
      ki = 1e-10
    NonlinearModel
      BA = (def.gamma+1)/2
    idealGas
      Rs = R_const/Mn
      heatcapacity = Cp(T)
      ratioofspecificheat = 1.4
      molarmass = 0.02897
      Cp: Piecewise | arg = T; pieces = {200.0, 1600.0, 1047.63657-0.372589265*T^1+9.45304214E-4*T^2-6.02409443E-7*T^3+1.2858961E-10*T^4}; argunit = K; fununit = J/(kg*K)
  mat2: Common "LYSO" on domains 7
    def "Basic"
      relpermeability = 1
      relpermittivity = 3.42
      electricconductivity = 0[S/m]
      eta: Piecewise | arg = T; pieces = {200.0, 1600.0, -8.38278E-7+8.35717342E-8*T^1-7.69429583E-11*T^2+4.6437266E-14*T^3-1.06585607E-17*T^4}; argunit = K; fununit = Pa*s
      Cp: Piecewise | arg = T; pieces = {200.0, 1600.0, 1047.63657-0.372589265*T^1+9.45304214E-4*T^2-6.02409443E-7*T^3+1.2858961E-10*T^4}; argunit = K; fununit = J/(kg*K)
      rho: Analytic | expr = pA*0.02897/R_const[K*mol/J]/T; args = {pA, T}; fununit = kg/m^3; argunit = {Pa, K}
      k: Piecewise | arg = T; pieces = {200.0, 1600.0, -0.00227583562+1.15480022E-4*T^1-7.90252856E-8*T^2+4.11702505E-11*T^3-7.43864331E-15*T^4}; argunit = K; fununit = W/(m*K)
      cs: Analytic | expr = sqrt(1.4*R_const[K*mol/J]/0.02897*T); args = T; fununit = m/s; argunit = K
      an1: Analytic | funcname = alpha_p; expr = -1/rho(pA,T)*d(rho(pA,T),T); args = {pA, T}; fununit = 1/K; argunit = {Pa, K}
      an2: Analytic "Analytic 2a" | funcname = muB; expr = 0.6*eta(T); args = T; fununit = Pa*s; argunit = K
    RefractiveIndex
      n = 1.85
      ki = jRINDEX
  mat3: Common "Glue" on domains 5, 8
    def "Basic"
      relpermeability = 1
      relpermittivity = 2.25
      electricconductivity = sigma[S/m]
    RefractiveIndex
      n = 1.5
      ki = jRINDEX_G
  mat4: Common "Resin" on domains 2, 3, 9, 10
    def "Basic"
      relpermeability = 1
      relpermittivity = 2.4025
      electricconductivity = sigma[S/m]
    RefractiveIndex
      n = 1.55
      ki = jRINDEX_R
  mat5: Common "Resin 1" on domains 3, 10
    def "Basic"
      relpermeability = 1
      relpermittivity = 2.4025
      electricconductivity = sigma[S/m]
    RefractiveIndex
      n = 5.0989
      ki = 0.23786

Physics
  temw: TransientElectromagneticWaves "Electromagnetic Waves, Transient" (disabled) on all domains
    dependent variable A = {Ax, Ay, Az}
    wee1: WaveEquationElectric (default) | DisplacementFieldModel = RefractiveIndex
    pec1: PerfectElectricConductor (default)
    init1: init "Initial Values 1" (default)
    sctr1: Scattering "Scattering Boundary Condition 1" on boundaries 23, 24
      IncidentField = EField
      E0i = {A(t,y)/2*1/sqrt(3), A(t,y)/2*1/sqrt(3), A(t,y)/2*1/sqrt(3)}
      WaveType = CylindricalWave
      kdir = {-temw.nx, -temw.ny, 0}
      r0 = {impact_location*LYSO_L/2, y, 0}
      DispersionAndAbsorptionModel = LowLossApproximation
      CarrierFrequency = 0.0024[GHz]
    sctr3: Scattering "Scattering Boundary Condition 3" on boundaries 23
      IncidentField = EField
      E0i = {A(t,y)/2*1/sqrt(3), A(t,y)/2*1/sqrt(3), A(t,y)/2*1/sqrt(3)}
      WaveType = CylindricalWave
      kdir = {-temw.nx, -temw.ny, 0}
      r0 = {impact_location*LYSO_L/2, y, 0}
      DispersionAndAbsorptionModel = LowLossApproximation
      CarrierFrequency = 0.0024[GHz]
    sctr2: Scattering "Scattering Boundary Condition 2" on boundaries 3, 4, 6-8, 10, 12-20, 25-37, 39, 41
      WaveType = PlaneWave
      r0 = {impact_location*LYSO_L/2, y, 0}
      DispersionAndAbsorptionModel = LowLossApproximation
      CarrierFrequency = 0.0024[GHz]
    pec2: PerfectElectricConductor (disabled) on no boundaries
  ewt: ElectromagneticWavesTransient (disabled) on all domains
    dependent variable A2 = {A2x, A2y, A2z}
    components.components = threecomponent
    wee1: WaveEquationElectric (default)
    pec1: PerfectElectricConductor (default)
    init1: init "Initial Values 1" (default)
    sctr1: Scattering "Scattering Boundary Condition 1" on boundaries 23, 24
      IncidentField = EField
      E0i = {A(t,y)/2*1/sqrt(3), A(t,y)/2*1/sqrt(3), A(t,y)/2*1/sqrt(3)}
      WaveType = CylindricalWave
      r0 = {impact_location*LYSO_L/2, y, 0}
    sctr3: Scattering "Scattering Boundary Condition 3" on boundaries 23
      IncidentField = EField
      E0i = {A(t,y)/2*1/sqrt(3), A(t,y)/2*1/sqrt(3), A(t,y)/2*1/sqrt(3)}
      WaveType = CylindricalWave
      r0 = {impact_location*LYSO_L/2, y, 0}
    sctr2: Scattering "Scattering Boundary Condition 2" on boundaries 3, 6-8, 12, 35-37, 39, 41
  emw: ElectromagneticWaves "Electromagnetic Waves, Frequency Domain" (disabled) on all domains
    dependent variable E = {Ex, Ey, Ez}
    wee1: WaveEquationElectric (default)
    pec1: PerfectElectricConductor (default)
    init1: init "Initial Values 1" (default)
  ewfd: ElectromagneticWavesFrequencyDomain on all domains
    dependent variable E2 = {E2x, E2y, E2z}
    components.components = inplane
    wee1: WaveEquationElectric (default)
    pec1: PerfectElectricConductor (default)
    init1: init "Initial Values 1" (default)
    sctr1: Scattering "Scattering Boundary Condition 1" on boundaries 23, 24
      IncidentField = EField
      E0i = {1000, 1000, 1000}
      WaveType = CylindricalWave
      r0 = {impact_location*LYSO_L/2, y, 0}
      Order = SecondOrder
    sctr2: Scattering "Scattering Boundary Condition 2" on boundaries 1-13, 15-18, 20-22, 25-31, 33-42
      IncidentField = NoIncidentField
      E0i = {Ampl, Ampl, Ampl}
      Order = SecondOrder
    trans1: TransitionBoundaryCondition (disabled) on no boundaries
    scu1: SurfaceCurrent "Surface Current Density 1" (disabled) on boundaries 23, 24 | Js0 = {1, 1, 0}
    efb1: ElectricField (disabled) on boundaries 23, 24 | E0 = {Ampl, Ampl, 0}
    sctr3: Scattering "Scattering Boundary Condition 3" on boundaries 24
      IncidentField = EField
      E0i = {1000, 1000, 1000}
      WaveType = CylindricalWave
      r0 = {impact_location*LYSO_L/2, y, 0}
      Order = SecondOrder

Mesh
  mesh1 "Mesh 1" (physics-controlled)

Studies
  std1 "Study 1"
    freq: Frequency "Frequency Domain" | punit = THz; plist = {c_const/(wavelength)}

Solver configurations
  sol1 "Solution 1" (study std1)
    v1: Variables "Dependent Variables 1"
    s1: Stationary "Stationary Solver 1" | stol = 0.01; linpmethod = sol
      p1: Parametric | pname = freq; plistarr = {c_const/(wavelength)}; punit = THz; pcontinuationmode = no
      fc1: FullyCoupled | linsolver = d1
      d1: Direct "Suggested Direct Solver (ewfd)"

Datasets
  dset1: Solution | solution = sol1
  dset2: Solution "Probe Solution 2" | solution = sol1
  cpt1: CutPoint2D "Domain Point Probe 1" | data = dset2; pointx = -3.0E-4-0.5*LYSO_L-Glue_thick; pointy = 0
  cpt2: CutPoint2D "Domain Point Probe 2" | data = dset2; pointx = 3.0E-4+0.5*LYSO_L+Glue_thick; pointy = 0

Derived values
  pev1: EvalPoint "Point Probe Expression 1" | data = cpt1; table = tbl1; expr = temw.We
  pev2: EvalPoint "Point Probe Expression 2" | data = cpt2; table = tbl1; expr = temw.We
  int1: IntLine "Line Integration 1" on boundaries 12
    data = dset1
    table = tbl12
    expr = ewfd.normE^2
    unit = kg^2*m^3/(s^6*A^2)
  int2: IntSurface "Surface Integration 2" on domains 3, 10
    data = dset1
    table = tbl15
    expr = ewfd.normE^2
    unit = kg^2*m^4/(s^6*A^2)

Tables
  tbl1: Table "Probe Table 1"
    freq (THz) | temw.We, Point: (-3.0E-4-0.5*LYSO_L-Glue_thick, 0) | temw.We, Point: (3.0E-4+0.5*LYSO_L+Glue_thick, 0)
    0.199862 | nan | nan
  tbl2: Table
    // Line Integration 1
    freq (THz)
    0.000516884
  tbl3: Table
    // Line Integration 1
    freq (THz) | ewfd.normE^2 (kg^2*m^3/(s^6*A^2)) | ewfd.normE^2 (kg^2*m^3/(s^6*A^2)) | ewfd.normE^2 (kg^2*m^3/(s^6*A^2)) | ewfd.normE^2 (kg^2*m^3/(s^6*A^2)) | ewfd.normE^2 (kg^2*m^3/(s^6*A^2)) | ewfd.normE^2 (kg^2*m^3/(s^6*A^2)) | ewfd.normE^2 (kg^2*m^3/(s^6*A^2)) | ewfd.normE^2 (kg^2*m^3/(s^6*A^2)) | ewfd.normE^2 (kg^2*m^3/(s^6*A^2)) | ewfd.normE^2 (kg^2*m^3/(s^6*A^2))
    0.299792 | 7088.79 | 6952.78 | 304.229 | 0.184372 | 12002 | 12001.7 | 28270.1 | 66049.5 | 5163.77 | 8154.22
  tbl4: Table
    // Line Integration 1
    freq (THz) | ewfd.normE^2 (kg^2*m^3/(s^6*A^2)) | ewfd.normE^2 (kg^2*m^3/(s^6*A^2))
    0.00525952 | 2439.8 | 0.0131861
  tbl5: Table
    // Line Integration 1
    freq (THz) | ewfd.normE^2 (kg^2*m^3/(s^6*A^2)) | ewfd.normE^2 (kg^2*m^3/(s^6*A^2)) | ewfd.normE^2 (kg^2*m^3/(s^6*A^2)) | ewfd.normE^2 (kg^2*m^3/(s^6*A^2))
    0.299792 | 4822.8 | 8020.84 | 6900.46 | 6763.89
  tbl6: Table
    // Line Integration 1
    freq (THz) | ewfd.normE^2 (kg^2*m^3/(s^6*A^2)) | ewfd.normE^2 (kg^2*m^3/(s^6*A^2)) | ewfd.normE^2 (kg^2*m^3/(s^6*A^2))
    0.000299792 | 0.00714913 | 19.851 | 125.776
  tbl7: Table
    // Line Integration 1
    freq (THz) | ewfd.normE^2 (kg^2*m^3/(s^6*A^2)) | ewfd.normE^2 (kg^2*m^3/(s^6*A^2)) | ewfd.normE^2 (kg^2*m^3/(s^6*A^2))
    0.999308 | 125.776 | 126.163 | 834.958
  tbl8: Table
    // Surface Integration 2
    freq (THz) | ewfd.normE^2 (kg^2*m^4/(s^6*A^2)) | ewfd.normE^2 (kg^2*m^4/(s^6*A^2)) | ewfd.normE^2 (kg^2*m^4/(s^6*A^2))
    0.999308 | 0.0120166 | 0.0119771 | 0.0951439
  tbl9: Table
    // Line Integration 1
    freq (THz) | ewfd.normE^2 (kg^2*m^3/(s^6*A^2)) | ewfd.normE^2 (kg^2*m^3/(s^6*A^2))
    0.599585 | 834.958 | 690.619
  tbl10: Table
    // Surface Integration 2
    freq (THz) | ewfd.normE^2 (kg^2*m^4/(s^6*A^2)) | ewfd.normE^2 (kg^2*m^4/(s^6*A^2))
    0.599585 | 0.0951439 | 0.0951439
  tbl11: Table
    // Surface Integration 2
    freq (THz) | ewfd.normE^2 (kg^2*m^4/(s^6*A^2)) | ewfd.normE^2 (kg^2*m^4/(s^6*A^2))
    0.599585 | 0.0951439 | 0.106335
  tbl12: Table
    // Line Integration 1
    freq (THz) | ewfd.normE^2 (kg^2*m^3/(s^6*A^2)) | ewfd.normE^2 (kg^2*m^3/(s^6*A^2))
    0.599585 | 836.41 | 732.152
  tbl13: Table
    // Surface Integration 2
    freq (THz) | ewfd.normE^2 (kg^2*m^4/(s^6*A^2)) | ewfd.normE^2 (kg^2*m^4/(s^6*A^2)) | ewfd.normE^2 (kg^2*m^4/(s^6*A^2)) | ewfd.normE^2 (kg^2*m^4/(s^6*A^2))
    0.499654 | 0.115757 | 0.106318 | 0.111474 | 0.110934
  tbl14: Table
    // Surface Integration 2
    freq (THz) | ewfd.normE^2 (kg^2*m^4/(s^6*A^2)) | ewfd.normE^2 (kg^2*m^4/(s^6*A^2)) | ewfd.normE^2 (kg^2*m^4/(s^6*A^2)) | ewfd.normE^2 (kg^2*m^4/(s^6*A^2))
    0.199862 | 0.363339 | 0.363636 | 0.336853 | 0.401464
  tbl15: Table
    // Surface Integration 2
    freq (THz) | ewfd.normE^2 (kg^2*m^4/(s^6*A^2)) | ewfd.normE^2 (kg^2*m^4/(s^6*A^2))
    0.199862 | 0.320529 | 0.320185

Plots
  pg2: PlotGroup1D "Probe Plot Group 2"
    tblp1: Table "Probe Table Graph 1" | table = tbl1
  pg3: PlotGroup2D "Electric Field (ewfd)" | data = dset1
    surf1: Surface | expr = ewfd.normE
  pg4: PlotGroup2D "2D Plot Group 4" on domains 7 | data = dset1
    surf1: Surface | expr = ewfd.normE^2
  pg5: PlotGroup2D "2D Plot Group 5" | data = dset2
    surf1: Surface | expr = ewfd.normE^2
  pg6: PlotGroup2D "2D Plot Group 6" | data = dset2
    surf1: Surface | expr = ewfd.normE^2