// COMSOL Multiphysics 6.1.0.357 model "Scintillator3D_1DStudy_2Dgeomv2 - Copy.mph"
// Outline of the model tree

Parameters
  LYSO_L = 0.057[m]
  LYSO_h = 0.003[m]
  mesh_size = 0.0001[m]
  Glue_thick = 0.0002
  Resin_Thick = 0.0005
  SiPM_Thick = 0.0003
  t_r = 70e-12[s]
  t_d = 140e-12[s]
  v = 0.97
  v0 = c_const*v
  time_step = 0.5e-11
  time_end = 10e-9
  maxmeshsize = 0.001
  minmeshsize = 0.00075
  impact_location = 0.5
  sim_x = LYSO_L/2-LYSO_L*impact_location
  space_impact = 0[mm]
  displace_x = LYSO_L/2-sim_x
  SiPM_perc = 0.8
  LYSO2 = LYSO_L - sim_x
  start_LYSO2 = displace_x-space_impact
  Study1D = 1
  impact_cyl = 0
  impact_width = 0.0001
  xI = impact_location*LYSO_L/2
  ym = LYSO_h/2*(2-2*Study1D)/(LYSO_L/2)
  yn = LYSO_h/2*Study1D
  ymin = -(ym*xI+yn)
  Ampl = 1E7

Functions
  an1: Analytic | funcname = t0; expr = (y-(ymin))/v0; args = y; argunit = m
  an2: Analytic | funcname = Heaviside_t0; expr = 0.5 * (1 + tanh((t-t0(y)) / (t_r/100))); args = {t, y}; argunit = {s, m}
  an3: Analytic | funcname = risedecay; expr = (exp(-(t-t0(y))/t_d)-exp(-(t-t0(y))/t_r)); args = {t, y}; argunit = {s, m}
  an4: Analytic | funcname = A; expr = Ampl*risedecay(t,y)*Heaviside_t0(t,y); args = {t, y}; argunit = {s, m}
  an5: Analytic | funcname = Heaviside_0; expr = 0.5 * (1 + tanh(y / (1e-12))); args = y
  step1: Step

Probes
  pdom1: DomainPoint "Domain Point Probe 1" | bndsnap2 = on; coords = {-LYSO_L/2-Glue_thick-0.0003, 0}
    ppb1: PointExpr "Point Probe Expression 1"
      expr = temw.We
      unit = J/m^3
      descr = Electric energy density
      table = tbl1
  pdom2: DomainPoint "Domain Point Probe 2" | bndsnap2 = on; coords = {LYSO_L/2+Glue_thick+0.0003, 0}
    ppb2: PointExpr "Point Probe Expression 2"
      expr = temw.We
      unit = J/m^3
      descr = Electric energy density
      table = tbl1
  pdom3: DomainPoint "Domain Point Probe 3" (disabled) | bndsnap2 = on; coords = {impact_location*LYSO_L/2, 0}
    ppb3: PointExpr "Point Probe Expression 3" | expr = temw.normE; unit = V/m; descr = Electric field norm; table = tbl1

Geometry
  geom1 "Geometry 1" (2D, length unit m)
    r2: Rectangle "Air" | pos = {-LYSO_L/2-Glue_thick, -0.006}; size = {LYSO_L+Glue_thick*2, 0.012}
    pol1: Polygon "LYSO"
      source = table
      table = 
        {-LYSO_L/2, -LYSO_h/2*(2-Study1D)}
        {-LYSO_L/2, LYSO_h/2*(2-Study1D)}
        {0, LYSO_h/2*Study1D}
        {LYSO_L/2, LYSO_h/2*(2-Study1D)}
        {LYSO_L/2, -LYSO_h/2*(2-Study1D)}
        {0, -LYSO_h/2*Study1D}
        {-LYSO_L/2, -LYSO_h/2*(2-Study1D)}
    r3: Rectangle "Impact" | pos = {-impact_width/2+impact_location*LYSO_L/2, -3}; size = {impact_width, 6}
    r1: Rectangle "Impact_Copy" | pos = {-impact_width/2+impact_location*LYSO_L/2, -3}; size = {impact_width, 6}
    dif1: Difference | input = pol1; input2 = r1
    dif2: Difference | input = r2; input2 = r3
    r4: Rectangle "Resin"
      pos = {-(LYSO_L/2)-Glue_thick-Resin_Thick, -0.0015-0.001-(LYSO_h/2*(2-Study1D)-0.003/2)*Heaviside_0(1-Study1D)}
      size = {Resin_Thick, 0.006+(LYSO_h*(2-Study1D)-0.003)*Heaviside_0(1-Study1D)}
    r6: Rectangle "SiPM" | pos = {-LYSO_L/2-Resin_Thick-Glue_thick, -0.0015}; size = {0.0003, 0.003}
    r5: Rectangle "Glue" | pos = {-(LYSO_L/2)-Glue_thick, -LYSO_h/2*(2-Study1D)}; size = {Glue_thick, LYSO_h*(2-Study1D)}
    r7: Rectangle "Resin 1"
      pos = {(LYSO_L/2)+Glue_thick, -0.0015-0.001-(LYSO_h/2*(2-Study1D)-0.003/2)*Heaviside_0(1-Study1D)}
      size = {Resin_Thick, 0.006+(LYSO_h*(2-Study1D)-0.003)*Heaviside_0(1-Study1D)}
    r8: Rectangle "SiPM 1" | pos = {(LYSO_L/2)+Glue_thick+Resin_Thick-0.0003, -0.0015}; size = {0.0003, 0.003}
    r9: Rectangle "Glue 1" | pos = {+(LYSO_L/2), -LYSO_h/2*(2-Study1D)}; size = {Glue_thick, LYSO_h*(2-Study1D)}
    dif3: Difference | input = r7; input2 = r8
    dif4: Difference | input = r4; input2 = r6
    r10: Rectangle (disabled) | pos = {LYSO_L/4, -0.003}; size = {0.00001, 0.006}
    r11: Rectangle (disabled) | pos = {-LYSO_L/2, 0.0015}; size = {LYSO_L, 0.00001}
    r12: Rectangle (disabled) | pos = {-LYSO_L/4, -0.003}; size = {0.00001, 0.006}
    r13: Rectangle (disabled) | pos = {-LYSO_L/2, -0.0015}; size = {LYSO_L, 0.00001}
    fin: Finalize "Form Union"

Materials
  mat1: Common "Air" on all domains
    def "Basic"
      thermalexpansioncoefficient = alpha_p(pA,T)
      molarmass = 0.02897[kg/mol]
      bulkviscosity = muB(T)
      relpermeability = 1
      relpermittivity = 1
      dynamicviscosity = eta(T)
      ratioofspecificheat = 1.4
      electricconductivity = 0[S/m]
      heatcapacity = Cp(T)
      density = rho(pA,T)
      thermalconductivity = k(T)
      soundspeed = cs(T)
      eta: Piecewise | arg = T; pieces = {200.0, 1600.0, -8.38278E-7+8.35717342E-8*T^1-7.69429583E-11*T^2+4.6437266E-14*T^3-1.06585607E-17*T^4}; argunit = K; fununit = Pa*s
      Cp: Piecewise | arg = T; pieces = {200.0, 1600.0, 1047.63657-0.372589265*T^1+9.45304214E-4*T^2-6.02409443E-7*T^3+1.2858961E-10*T^4}; argunit = K; fununit = J/(kg*K)
      rho: Analytic | expr = pA*0.02897/R_const[K*mol/J]/T; args = {pA, T}; fununit = kg/m^3; argunit = {Pa, K}
      k: Piecewise | arg = T; pieces = {200.0, 1600.0, -0.00227583562+1.15480022E-4*T^1-7.90252856E-8*T^2+4.11702505E-11*T^3-7.43864331E-15*T^4}; argunit = K; fununit = W/(m*K)
      cs: Analytic | expr = sqrt(1.4*R_const[K*mol/J]/0.02897*T); args = T; fununit = m/s; argunit = K
      an1: Analytic | funcname = alpha_p; expr = -1/rho(pA,T)*d(rho(pA,T),T); args = {pA, T}; fununit = 1/K; argunit = {Pa, K}
      an2: Analytic "Analytic 2a" | funcname = muB; expr = 0.6*eta(T); args = T; fununit = Pa*s; argunit = K
    RefractiveIndex
      n = 1
      ki = 0
    NonlinearModel
      BA = (def.gamma+1)/2
    idealGas
      Rs = R_const/Mn
      heatcapacity = Cp(T)
      ratioofspecificheat = 1.4
      molarmass = 0.02897
      Cp: Piecewise | arg = T; pieces = {200.0, 1600.0, 1047.63657-0.372589265*T^1+9.45304214E-4*T^2-6.02409443E-7*T^3+1.2858961E-10*T^4}; argunit = K; fununit = J/(kg*K)
  mat2: Common "LYSO" on domains 6, 8
    def "Basic"
      thermalexpansioncoefficient = alpha_p(pA,T)
      molarmass = 0.02897[kg/mol]
      bulkviscosity = muB(T)
      relpermeability = 1
      relpermittivity = 3.24
      dynamicviscosity = eta(T)
      ratioofspecificheat = 1.4
      electricconductivity = 0[S/m]
      heatcapacity = Cp(T)
      density = rho(pA,T)
      thermalconductivity = k(T)
      soundspeed = cs(T)
      eta: Piecewise | arg = T; pieces = {200.0, 1600.0, -8.38278E-7+8.35717342E-8*T^1-7.69429583E-11*T^2+4.6437266E-14*T^3-1.06585607E-17*T^4}; argunit = K; fununit = Pa*s
      Cp: Piecewise | arg = T; pieces = {200.0, 1600.0, 1047.63657-0.372589265*T^1+9.45304214E-4*T^2-6.02409443E-7*T^3+1.2858961E-10*T^4}; argunit = K; fununit = J/(kg*K)
      rho: Analytic | expr = pA*0.02897/R_const[K*mol/J]/T; args = {pA, T}; fununit = kg/m^3; argunit = {Pa, K}
      k: Piecewise | arg = T; pieces = {200.0, 1600.0, -0.00227583562+1.15480022E-4*T^1-7.90252856E-8*T^2+4.11702505E-11*T^3-7.43864331E-15*T^4}; argunit = K; fununit = W/(m*K)
      cs: Analytic | expr = sqrt(1.4*R_const[K*mol/J]/0.02897*T); args = T; fununit = m/s; argunit = K
      an1: Analytic | funcname = alpha_p; expr = -1/rho(pA,T)*d(rho(pA,T),T); args = {pA, T}; fununit = 1/K; argunit = {Pa, K}
      an2: Analytic "Analytic 2a" | funcname = muB; expr = 0.6*eta(T); args = T; fununit = Pa*s; argunit = K
    RefractiveIndex
      n = 1.8
      ki = 0
    NonlinearModel
      BA = (def.gamma+1)/2
    idealGas
      Rs = R_const/Mn
      heatcapacity = Cp(T)
      ratioofspecificheat = 1.4
      molarmass = 0.02897
      Cp: Piecewise | arg = T; pieces = {200.0, 1600.0, 1047.63657-0.372589265*T^1+9.45304214E-4*T^2-6.02409443E-7*T^3+1.2858961E-10*T^4}; argunit = K; fununit = J/(kg*K)
  mat3: Common "Glue" on domains 4, 10
    def "Basic"
      thermalexpansioncoefficient = alpha_p(pA,T)
      molarmass = 0.02897[kg/mol]
      bulkviscosity = muB(T)
      relpermeability = 1
      relpermittivity = 2.4025
      dynamicviscosity = eta(T)
      ratioofspecificheat = 1.4
      electricconductivity = 0[S/m]
      heatcapacity = Cp(T)
      density = rho(pA,T)
      thermalconductivity = k(T)
      soundspeed = cs(T)
      eta: Piecewise | arg = T; pieces = {200.0, 1600.0, -8.38278E-7+8.35717342E-8*T^1-7.69429583E-11*T^2+4.6437266E-14*T^3-1.06585607E-17*T^4}; argunit = K; fununit = Pa*s
      Cp: Piecewise | arg = T; pieces = {200.0, 1600.0, 1047.63657-0.372589265*T^1+9.45304214E-4*T^2-6.02409443E-7*T^3+1.2858961E-10*T^4}; argunit = K; fununit = J/(kg*K)
      rho: Analytic | expr = pA*0.02897/R_const[K*mol/J]/T; args = {pA, T}; fununit = kg/m^3; argunit = {Pa, K}
      k: Piecewise | arg = T; pieces = {200.0, 1600.0, -0.00227583562+1.15480022E-4*T^1-7.90252856E-8*T^2+4.11702505E-11*T^3-7.43864331E-15*T^4}; argunit = K; fununit = W/(m*K)
      cs: Analytic | expr = sqrt(1.4*R_const[K*mol/J]/0.02897*T); args = T; fununit = m/s; argunit = K
      an1: Analytic | funcname = alpha_p; expr = -1/rho(pA,T)*d(rho(pA,T),T); args = {pA, T}; fununit = 1/K; argunit = {Pa, K}
      an2: Analytic "Analytic 2a" | funcname = muB; expr = 0.6*eta(T); args = T; fununit = Pa*s; argunit = K
    RefractiveIndex
      n = 1.55
      ki = 0
    NonlinearModel
      BA = (def.gamma+1)/2
    idealGas
      Rs = R_const/Mn
      heatcapacity = Cp(T)
      ratioofspecificheat = 1.4
      molarmass = 0.02897
      Cp: Piecewise | arg = T; pieces = {200.0, 1600.0, 1047.63657-0.372589265*T^1+9.45304214E-4*T^2-6.02409443E-7*T^3+1.2858961E-10*T^4}; argunit = K; fununit = J/(kg*K)
  mat4: Common "Resin" on domains 1, 2, 11, 12
    def "Basic"
      thermalexpansioncoefficient = alpha_p(pA,T)
      molarmass = 0.02897[kg/mol]
      bulkviscosity = muB(T)
      relpermeability = 1
      relpermittivity = 2.25
      dynamicviscosity = eta(T)
      ratioofspecificheat = 1.4
      electricconductivity = 0[S/m]
      heatcapacity = Cp(T)
      density = rho(pA,T)
      thermalconductivity = k(T)
      soundspeed = cs(T)
      eta: Piecewise | arg = T; pieces = {200.0, 1600.0, -8.38278E-7+8.35717342E-8*T^1-7.69429583E-11*T^2+4.6437266E-14*T^3-1.06585607E-17*T^4}; argunit = K; fununit = Pa*s
      Cp: Piecewise | arg = T; pieces = {200.0, 1600.0, 1047.63657-0.372589265*T^1+9.45304214E-4*T^2-6.02409443E-7*T^3+1.2858961E-10*T^4}; argunit = K; fununit = J/(kg*K)
      rho: Analytic | expr = pA*0.02897/R_const[K*mol/J]/T; args = {pA, T}; fununit = kg/m^3; argunit = {Pa, K}
      k: Piecewise | arg = T; pieces = {200.0, 1600.0, -0.00227583562+1.15480022E-4*T^1-7.90252856E-8*T^2+4.11702505E-11*T^3-7.43864331E-15*T^4}; argunit = K; fununit = W/(m*K)
      cs: Analytic | expr = sqrt(1.4*R_const[K*mol/J]/0.02897*T); args = T; fununit = m/s; argunit = K
      an1: Analytic | funcname = alpha_p; expr = -1/rho(pA,T)*d(rho(pA,T),T); args = {pA, T}; fununit = 1/K; argunit = {Pa, K}
      an2: Analytic "Analytic 2a" | funcname = muB; expr = 0.6*eta(T); args = T; fununit = Pa*s; argunit = K
    RefractiveIndex
      n = 1.5
      ki = 0
    NonlinearModel
      BA = (def.gamma+1)/2
    idealGas
      Rs = R_const/Mn
      heatcapacity = Cp(T)
      ratioofspecificheat = 1.4
      molarmass = 0.02897
      Cp: Piecewise | arg = T; pieces = {200.0, 1600.0, 1047.63657-0.372589265*T^1+9.45304214E-4*T^2-6.02409443E-7*T^3+1.2858961E-10*T^4}; argunit = K; fununit = J/(kg*K)

Physics
  temw: TransientElectromagneticWaves "Electromagnetic Waves, Transient" on all domains
    dependent variable A = {Ax, Ay, Az}
    wee1: WaveEquationElectric (default)
    pec1: PerfectElectricConductor (default)
    init1: init "Initial Values 1" (default)
    sctr1: Scattering "Scattering Boundary Condition 1" on boundaries 22, 26
      IncidentField = EField
      E0i = {A(t,y), A(t,y), A(t,y)}
      WaveType = CylindricalWave
      r0 = {impact_location*LYSO_L/2, y, 0}
    sctr2: Scattering "Scattering Boundary Condition 2" on boundaries 1-16, 21, 23-25, 28, 30, 31, 34-44

Mesh
  mesh1 "Mesh 1"
    size: MeshSizeDefault | hmax = maxmeshsize; hmin = minmeshsize; hauto = 1; custom = on
    ftri1: FreeTri "Free Triangular 1" on remaining entities | smoothmaxiter = 4; smoothmaxdepth = 4
      size1: Size on boundaries 1-6, 9, 10, 12, 13, 16, 22, 26, 31, 35-40, 42-44
        hmax = minmeshsize
        hmin = minmeshsize
        custom = on
      size2: Size on domains 1, 2, 4, 10-12 | hmax = minmeshsize; hmin = minmeshsize; custom = on

Studies
  std1 "Study 1"
    time: Transient "Time Dependent" | tlist = range(0,0.75e-12,1.5e-9)

Solver configurations
  sol1 "Solution 1" (study std1)
    v1: Variables "Dependent Variables 1"
    t1: Time "Time-Dependent Solver 1" | tlist = range(0,0.75e-12,1.5e-9); rtol = 0.001; timemethod = genalpha
      fc1: FullyCoupled | linsolver = d1
      d1: Direct "Suggested Direct Solver (temw)" | linsolver = pardiso

Datasets
  dset1: Solution | solution = sol1
  dset2: Solution "Probe Solution 2" | solution = sol1
  cpt1: CutPoint2D "Domain Point Probe 1" | data = dset2; pointx = -3.0E-4-0.5*LYSO_L-Glue_thick; pointy = 0
  cpt2: CutPoint2D "Domain Point Probe 2" | data = dset2; pointx = 3.0E-4+0.5*LYSO_L+Glue_thick; pointy = 0
  cpt3: CutPoint2D "Domain Point Probe 3" | data = dset2; pointx = 0.5*impact_location*LYSO_L; pointy = 0

Derived values
  pev1: EvalPoint "Point Probe Expression 1" | data = cpt1; table = tbl1; expr = temw.We
  int1: IntLine "Line Integration 1" on boundaries 10
    data = dset1
    table = tbl2
    expr = temw.We
    unit = J/m^2
    descr = Electric energy density
  pev2: EvalPoint "Point Probe Expression 2" | data = cpt2; table = tbl1; expr = temw.We
  pev3: EvalPoint "Point Probe Expression 3" | data = cpt3; table = tbl1; expr = temw.normE
  int2: IntLine "Line Integration 2" on boundaries 10
    data = dset1
    table = tbl3
    expr = temw.We
    unit = J/m^2
    descr = Electric energy density
    method = integration
    dataseries = integral
    dataseriesmethod = summation
    dataseriescumulative = on

Tables
  tbl1: Table "Probe Table 1"
    Time (s) | Electric energy density (J/m^3), Point: (-3.0E-4-0.5*LYSO_L-Glue_thick, 0) | Electric energy density (J/m^3), Point: (3.0E-4+0.5*LYSO_L+Glue_thick, 0)
    0 | 3.27859e-103 | 1.00436e-50
    1.5e-12 | 7.8468e-103 | 2.69005e-49
    4.5e-12 | 1.06404e-92 | 2.4475e-37
    7.5e-12 | 3.68056e-88 | 1.25022e-33
    1.05e-11 | 3.13611e-84 | 1.53267e-30
    1.35e-11 | 1.16873e-80 | 7.99958e-28
    1.65e-11 | 2.40936e-77 | 2.24505e-25
    1.95e-11 | 3.12457e-74 | 3.84645e-23
    2.25e-11 | 2.76463e-71 | 4.356e-21
    2.55e-11 | 1.76487e-68 | 3.44208e-19
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  tbl2: Table
    // Line Integration 1
    Time (s) | Electric energy density (J/m^2)
    0 | 1.73007e-53
    2e-12 | 8.90859e-39
    4e-12 | 2.22715e-37
    6e-12 | 3.41432e-34
    8e-12 | 4.87367e-32
    1e-11 | 9.18303e-31
    1.2e-11 | 1.49988e-28
    1.4e-11 | 6.02512e-27
    1.6e-11 | 8.68558e-26
    1.8e-11 | 4.86755e-24
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  tbl3: Table
    // Line Integration 2
    Time (s) | Cumulative integral: Electric energy density (J*s/m^2) | Cumulative integral: Electric energy density (J/m^2)
    0 | 0 | 1.73007e-53
    7.5e-13 | 5.8867e-65 | 1.56979e-52
    1.5e-12 | 2.55065e-64 | 5.40495e-52
    2.25e-12 | 7.51662e-51 | 2.00443e-38
    3e-12 | 4.50997e-50 | 1.00222e-37
    3.75e-12 | 1.42816e-49 | 2.8062e-37
    4.5e-12 | 3.30731e-49 | 6.0133e-37
    5.25e-12 | 3.4452e-47 | 9.12707e-35
    6e-12 | 1.9649e-46 | 4.32703e-34
    6.75e-12 | 6.06755e-46 | 1.18531e-33
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
Plots
  pg1: PlotGroup2D "2D Plot Group 1" | data = dset1
    surf1: Surface | expr = temw.normE; descr = Electric field norm
    surf2: Surface (disabled) | expr = temw.normE
  pg2: PlotGroup1D "Probe Plot Group 2"
    tblp1: Table "Probe Table Graph 1" | table = tbl1
  pg3: PlotGroup1D "1D Plot Group 3" | data = dset1
    tblp1: Table "Table Graph 1" | table = tbl3
  pg4: PlotGroup1D "1D Plot Group 4" | data = dset1
    tblp1: Table "Table Graph 1" | table = tbl2

Exports
  anim1: Animation | target = player; framesel = all; frametime = 0.01